import Sofa
import Sofa.Core
import Sofa.constants.Key as Key
import os

mesh_path = os.path.abspath('..')+'/output_files_dir/output_files_demo_reference/out_edited.vtu'
floor_path = os.path.abspath('.')+'/mesh/floorFlat.obj'

def createScene(rootNode):
        rootNode.gravity.value = [0, -100, 0]
        rootNode.dt = 0.04
        rootNode.addObject('RequiredPlugin', pluginName='SoftRobots SofaPython3')
        rootNode.addObject('VisualStyle', displayFlags='showBehaviorModels showForceFields')
        # rootNode.addObject('FreeMotionAnimationLoop')
        # rootNode.addObject('GenericConstraintSolver', tolerance=1e-5, maxIterations=100)
        ##########################################
        #              Plane Model               #
        ##########################################
        # planeNode = rootNode.addChild('Plane')
        # planeNode.addObject('MeshOBJLoader', name='loader', filename=floor_path, triangulate=True, rotation=[0, 0, 270], scale=10, translation=[-122, 0, 0])
        # planeNode.addObject('MeshTopology', src='@loader')
        # planeNode.addObject('MechanicalObject', src='@loader')
        # planeNode.addObject('TriangleCollisionModel', simulated=False, moving=False)
        # planeNode.addObject('LineCollisionModel', simulated=False, moving=False)
        # planeNode.addObject('PointCollisionModel', simulated=False, moving=False)
        # planeNode.addObject('OglModel', name='Visual', src='@loader', color=[1, 0, 0, 1])
        floor = rootNode.addChild('Floor')
        floor_loader = floor.addObject('MeshOBJLoader', name='surface_loader', filename='mesh/floor.obj',
                                    scale3d=[2, 0.1, 2], translation=[0, -20.5, 0])
        floor.addObject('OglModel', src=floor_loader.getLinkPath())
        ##########################################
        #                FEM Model               #
        ##########################################
        MultiMaterial = rootNode.addChild('MultiMaterial')
        MultiMaterial.addObject('EulerImplicitSolver', rayleighStiffness=0.01, rayleighMass=0.01)
        MultiMaterial.addObject('CGLinearSolver', iterations=25, tolerance=1e-6, threshold=1e-20)
        MultiMaterial.addObject('MeshVTKLoader', name='loader', filename=mesh_path, onlyAttachedPoints=False)
        MultiMaterial.addObject('MeshTopology', src='@loader', name='container')
        MultiMaterial.addObject('MechanicalObject', name='tetras', template='Vec3d', showIndices='false', showIndicesScale='4e-5', rx='0', dz='0')
        MultiMaterial.addObject('UniformMass', totalMass=0.100)
        MultiMaterial.addObject('TetrahedronFEMForceField', template='Vec3', name='FEM', method='large', poissonRatio=0.4, youngModulus=100, listening=True, localStiffnessFactor="2 1 1 2 3 2 2 3 3 2 1 40 40 1 1 1 1 2 1 1 2 2 1 1 1 1 2 40 2 1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")
        MultiMaterial.addObject('PlaneForceField', normal='0 1 0', d='-20.5', stiffness='1000')
